// SBML level 2 version 4

model FEBS()

  // Compartments:
  compartment default = 1 volume;

  // Species:
  species E in default = 1;  // substance in mole
  species S in default = 1;  // substance in mole
  species C in default = 0;  // substance in mole
  species P in default = 1;  // substance in mole

  // Reactions:
  re1: E + S => C; E*S*re1_k1;
    re1_k1 = 6 substance;
  re2: C => E + P; C*re2_k1;
    re2_k1 = 1.2 substance;
  re3: C => E + S; C*re3_k1;
    re3_k1 = 0.8 substance;

  // Unit definitions:
  unit substance = mole;
  unit volume = litre;
  unit area = metre^2;
  unit length = metre;
  unit time = second;
end
