// SBML level 3 version 1

model FEBS()
  // FEBS - Antimony

  // Compartments:
  compartment default_compartment = 1 volume;

  // Species:
  species sp_E in default_compartment = 1;  // substance in quantity
  species sp_S in default_compartment = 1;  // substance in quantity
  species sp_C in default_compartment = 0;  // substance in quantity
  species sp_P in default_compartment = 0;  // substance in quantity

  // Parameters:
  k1 = 6;
  k2 = 0.8;
  k3 = 1.2;

  // Reactions:
  _J0: sp_E + sp_S -> sp_C; k1*sp_E*sp_S;
  _J1: sp_C -> sp_E + sp_S; k2*sp_C;
  _J2: sp_C -> sp_E + sp_P; k3*sp_C;

  // Unit definitions:
  unit quantity = mole;
  unit volume = litre;
end
